# Materiales
# Albañileria
f'_m := (150 kgf/cm^2)*0.25 = 375 tonnef/m^2
E_m := 1000*f'_m = 375000 tonnef/m^2
(150 kgf/cm^2)*0.25 = 375 tonnef/m^2
G_m := 0.3*E_m = 112500 tonnef/m^2
ν := 0.25
(150 kgf/cm^2)*0.25 = 37.5 kgf/cm^2
C := 5.5*10^-6*1/C = 5.5e-6 1/C
γ := 1.7 tonnef/m^3
# Hormigón
f'_c := 20 MPa = 2039.43 tonnef/m^2
E_c := 4700*sqrt(20)*MPa = 2143345 tonnef/m^2
ν := 0.2
γ := 2.5 tonnef/m^3
# Acero
f_y := 420 MPa = 42828.1 tonnef/m^2
f_u := 630 MPa = 64242.1 tonnef/m^2
E := 200000 MPa = 20394324 tonnef/m^2
